Thu 07/04/2019
10:46 AM
$PROBLEM
$INPUT      ID ITEM DV MDV
$DATA      trial_db_data.csv IGNORE=@
$PRED

;-----------------------------Hidden variable model------------------------------

PSI=ETA(1)

;----------------------------Item parameter selection----------------------------

;Constants to select the model type
GR=1
PL3=2

MODEL=0

IF(ITEM.EQ.1) THEN
	MODEL=GR
	DIS=THETA(1)		;I1DISGR
	DIF1=THETA(2)		;I1DIF1GR
	DIF2=THETA(3)		;I1DIF2GR
	DIF3=THETA(4)		;I1DIF3GR
	DIF4=THETA(5)		;I1DIF4GR
	DIF5=THETA(6)		;I1DIF5GR
ENDIF


IF(ITEM.EQ.2) THEN
	MODEL=GR
	DIS=THETA(7)		;I2DISGR
	DIF1=THETA(8)		;I2DIF1GR
	DIF2=THETA(9)		;I2DIF2GR
	DIF3=THETA(10)		;I2DIF3GR
	DIF4=THETA(11)		;I2DIF4GR
	DIF5=THETA(12)		;I2DIF5GR
ENDIF


IF(ITEM.EQ.3) THEN
	MODEL=PL3
	DIS=THETA(13)		;I3DISPL3
	DIF=THETA(14)		;I3DIFPL3
	GUE=THETA(15)		;I3GUEPL3
ENDIF

IF(ITEM.EQ.4) THEN
	MODEL=PL3
	DIS=THETA(16)		;I4DISPL3
	DIF=THETA(17)		;I4DIFPL3
	GUE=THETA(18)		;I4GUEPL3
ENDIF

IF(ITEM.EQ.5) THEN
	MODEL=PL3
	DIS=THETA(19)		;I5DISPL3
	DIF=THETA(20)		;I5DIFPL3
	GUE=THETA(21)		;I5GUEPL3
ENDIF

IF(ITEM.EQ.6) THEN
	MODEL=PL3
	DIS=THETA(22)		;I6DISPL3
	DIF=THETA(23)		;I6DIFPL3
	GUE=THETA(24)		;I6GUEPL3
ENDIF

IF(ITEM.EQ.7) THEN
	MODEL=PL3
	DIS=THETA(25)		;I7DISPL3
	DIF=THETA(26)		;I7DIFPL3
	GUE=THETA(27)		;I7GUEPL3
ENDIF


;---------------------3 parameter logit model implementation---------------------
IF(MODEL.EQ.PL3) THEN
 	P1=GUE+(1-GUE)*EXP(DIS*(PSI-DIF))/(1+EXP(DIS*(PSI-DIF)))
	P0=1-P1
ENDIF
IF(MODEL.EQ.PL3.AND.DV.EQ.0) P=P0
IF(MODEL.EQ.PL3.AND.DV.EQ.1) P=P1
;----------------------Graded response model implementation----------------------

IF(MODEL.EQ.GR) THEN
	DIFG1=DIF1
	DIFG2=DIFG1+DIF2
	DIFG3=DIFG2+DIF3
	DIFG4=DIFG3+DIF4
	DIFG5=DIFG4+DIF5

	PGE1=EXP(DIS*(PSI-DIFG1))/(1+EXP(DIS*(PSI-DIFG1)))
	PGE2=EXP(DIS*(PSI-DIFG2))/(1+EXP(DIS*(PSI-DIFG2)))
	PGE3=EXP(DIS*(PSI-DIFG3))/(1+EXP(DIS*(PSI-DIFG3)))
	PGE4=EXP(DIS*(PSI-DIFG4))/(1+EXP(DIS*(PSI-DIFG4)))
	PGE5=EXP(DIS*(PSI-DIFG5))/(1+EXP(DIS*(PSI-DIFG5)))

	P0=1-PGE1
	P1=PGE1-PGE2
	P2=PGE2-PGE3
	P3=PGE3-PGE4
	P4=PGE4-PGE5
	P5=PGE5
ENDIF

IF(MODEL.EQ.GR.AND.DV.EQ.0) P=P0
IF(MODEL.EQ.GR.AND.DV.EQ.1) P=P1
IF(MODEL.EQ.GR.AND.DV.EQ.2) P=P2
IF(MODEL.EQ.GR.AND.DV.EQ.3) P=P3
IF(MODEL.EQ.GR.AND.DV.EQ.4) P=P4
IF(MODEL.EQ.GR.AND.DV.EQ.5) P=P5

;------------------------Response probability prediction-------------------------

Y=-2*LOG(P)

;--------------------------------Simulation code---------------------------------

IF(ICALL.EQ.4) THEN
   	IF(MODEL.EQ.PL3) THEN
	   	CALL RANDOM (2,R)
   		SDV=0
		IF(P1.GT.R) SDV=1
	ENDIF

	IF(MODEL.EQ.GR) THEN
		CALL RANDOM (2,R)
		SDV=0
		IF(R.LT.PGE1) SDV=1
		IF(R.LT.PGE2) SDV=2
		IF(R.LT.PGE3) SDV=3
		IF(R.LT.PGE4) SDV=4
		IF(R.LT.PGE5) SDV=5
	ENDIF

	IF(ITEM.EQ.1) SCORE=0
	IF(ITEM.EQ.100) DV=SCORE
	SCORE=SCORE+SDV
	DV=SDV
ENDIF

$ESTIMATION MAXEVAL=99999 METHOD=COND LAPLACE -2LL PRINT=1
            MSFO=msf_run3
$TABLE      ID ITEM DV PSI MDV FILE=psi_estimates_tab3 NOAPPEND
            ONEHEADER NOPRINT
$TABLE      ID ITEM DIS DIF GUE DIF1 DIF2 DIF3 DIF4 DIF5 MDV
            FILE=item_parameters_tab3 NOAPPEND ONEHEADER NOPRINT
$OMEGA  1  FIX
$THETA  (0,1.188050) ; 1	I1DISGR
$THETA  -3.98983 ; 2	I1DIF1GR
$THETA  (0,1.546650,1000000) ; 3	I1DIF2GR
$THETA  (0,1.470980,1000000) ; 4	I1DIF3GR
$THETA  (0,1.992950,1000000) ; 5	I1DIF4GR
$THETA  (0,1.920180,1000000) ; 6	I1DIF5GR
$THETA  (0,1.978640) ; 7	I2DISGR
$THETA  -3.93708 ; 8	I2DIF1GR
$THETA  (0,2.036210,1000000) ; 9	I2DIF2GR
$THETA  (0,1.961200,1000000) ; 10	I2DIF3GR
$THETA  (0,1.034370,1000000) ; 11	I2DIF4GR
$THETA  (0,1.133410,1000000) ; 12	I2DIF5GR
$THETA  (0,1.987810) ; 13	I3DISPL3
$THETA  (-1000000,1.012210,1000000) ; 14	I3DIFPL3
$THETA  (0,0.01,1) ; 15	I3GUEPL3
$THETA  (0,1.512550) ; 16	I4DISPL3
$THETA  (-1000000,0.564404,1000000) ; 17	I4DIFPL3
$THETA  (0,0.01,1) ; 18	I4GUEPL3
$THETA  (0,0.554845) ; 19	I5DISPL3
$THETA  (-1000000,3.304470,1000000) ; 20	I5DIFPL3
$THETA  (0,0.01,1) ; 21	I5GUEPL3
$THETA  (0,0.551635) ; 22	I6DISPL3
$THETA  (-1000000,-0.25033,1000000) ; 23	I6DIFPL3
$THETA  (0,0.01,1) ; 24	I6GUEPL3
$THETA  (0,1.571860) ; 25	I7DISPL3
$THETA  (-1000000,1.623590,1000000) ; 26	I7DIFPL3
$THETA  (0,0.01,1) ; 27	I7GUEPL3

$PROBLEM
$INPUT      ID ITEM DV MDV
$DATA      trial_db_data.csv IGNORE=@ REWIND
$SIMULATION (21398012) (32131288 UNI) ONLYSIM NOPRED TRUE=FINAL
$MSFI      msf_run3
$TABLE      ID ITEM DV PSI MDV FILE=mirror_plot_tab3 NOAPPEND
            ONEHEADER NOPRINT

NM-TRAN MESSAGES
 WARNINGS AND ERRORS (IF ANY) FOR PROBLEM    1
 (WARNING  2) NM-TRAN INFERS THAT THE DATA ARE POPULATION.
 (WARNING  3) THERE MAY BE AN ERROR IN THE ABBREVIATED CODE. THE FOLLOWING
 ONE OR MORE RANDOM VARIABLES ARE DEFINED WITH "IF" STATEMENTS THAT DO NOT
 PROVIDE DEFINITIONS FOR BOTH THE "THEN" AND "ELSE" CASES. IF ALL
 CONDITIONS FAIL, THE VALUES OF THESE VARIABLES WILL BE ZERO.
   P1 P0 P PGE1 PGE2 PGE3 PGE4 PGE5 P2 P3 P4 P5
 (DATA WARNING   5) RECORD         8, DATA ITEM   3, CONTENTS: 7
 THE DV DATA ITEM IS POSITIVE, BUT THE MDV DATA ITEM IS 1
 (DATA WARNING   5) RECORD        16, DATA ITEM   3, CONTENTS: 9
 THE DV DATA ITEM IS POSITIVE, BUT THE MDV DATA ITEM IS 1
 * THE MAXIMUM NUMBER OF WARNINGS OF ONE OR MORE TYPES WAS REACHED.
 IT IS POSSIBLE THAT SOME WARNING MESSAGES WERE SUPPRESSED.
 (WARNING  27) THE ABBREVIATED CODE CONTAINS A SIMULATION BLOCK BUT THERE IS
 NO $SIMULATION RECORD.
 WARNINGS AND ERRORS (IF ANY) FOR PROBLEM    2
 (WARNING  2) NM-TRAN INFERS THAT THE DATA ARE POPULATION.
 * THE MAXIMUM NUMBER OF WARNINGS OF ONE OR MORE TYPES WAS REACHED.
 IT IS POSSIBLE THAT SOME WARNING MESSAGES WERE SUPPRESSED.
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
1NONLINEAR MIXED EFFECTS MODEL PROGRAM (NONMEM) VERSION 7.4.3
 ORIGINALLY DEVELOPED BY STUART BEAL, LEWIS SHEINER, AND ALISON BOECKMANN
 CURRENT DEVELOPERS ARE ROBERT BAUER, ICON DEVELOPMENT SOLUTIONS,
 AND ALISON BOECKMANN. IMPLEMENTATION, EFFICIENCY, AND STANDARDIZATION
 PERFORMED BY NOUS INFOSYSTEMS.
 PROBLEM NO.:         1

 TOT. NO. OF OBS RECS:    10500
 TOT. NO. OF INDIVIDUALS:     1500
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 #TBLN:      1
 #METH: Laplacian Conditional Estimation
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
 #TERM:
0MINIMIZATION SUCCESSFUL
 NO. OF FUNCTION EVALUATIONS USED:     2431
 NO. OF SIG. DIGITS IN FINAL EST.:  3.0
0PARAMETER ESTIMATE IS NEAR ITS BOUNDARY
 THIS MUST BE ADDRESSED BEFORE THE COVARIANCE STEP CAN BE IMPLEMENTED

 ETABAR IS THE ARITHMETIC MEAN OF THE ETA-ESTIMATES,
 AND THE P-VALUE IS GIVEN FOR THE NULL HYPOTHESIS THAT THE TRUE MEAN IS 0.

 ETABAR:         4.4015E-02
 SE:             2.2026E-02
 N:                    1500

 P VAL.:         4.5689E-02

 ETASHRINKSD(%)  1.4663E+01
 ETASHRINKVR(%)  2.7177E+01
 EBVSHRINKSD(%)  1.5648E+01
 EBVSHRINKVR(%)  2.8848E+01
 EPSSHRINKSD(%)  1.0000E+02
 EPSSHRINKVR(%)  1.0000E+02


 TOTAL DATA POINTS NORMALLY DISTRIBUTED (N):            0
 N*LOG(2PI) CONSTANT TO OBJECTIVE FUNCTION:    0.0000000000000000
 OBJECTIVE FUNCTION VALUE WITHOUT CONSTANT:    15337.313848544487
 OBJECTIVE FUNCTION VALUE WITH CONSTANT:       15337.313848544487
 REPORTED OBJECTIVE FUNCTION DOES NOT CONTAIN CONSTANT

 TOTAL EFFECTIVE ETAS (NIND*NETA):                          1500


 #TERE:
 Elapsed estimation  time in seconds:    98.19
 Elapsed postprocess time in seconds:     0.11

 ********************                         LAPLACIAN CONDITIONAL ESTIMATION                       ********************
 #OBJT:**************                       MINIMUM VALUE OF OBJECTIVE FUNCTION                      ********************
 #OBJV:********************************************    15337.314       **************************************************

 ********************                         LAPLACIAN CONDITIONAL ESTIMATION                       ********************
 ********************                             FINAL PARAMETER ESTIMATE                           ********************

 THETA - VECTOR OF FIXED EFFECTS PARAMETERS   *********
         TH 1      TH 2      TH 3      TH 4      TH 5      TH 6      TH 7      TH 8      TH 9      TH10      TH11      TH12
          TH13      TH14      TH15      TH16      TH17      TH18      TH19      TH20      TH21      TH22      TH23      TH24
         TH25      TH26      TH27
         1.22E+00 -3.93E+00  1.52E+00  1.45E+00  1.97E+00  1.88E+00  1.92E+00 -4.01E+00  2.08E+00  2.00E+00  1.04E+00  1.13E+00
          2.04E+00  1.01E+00  1.00E-04  1.55E+00  5.63E-01  1.00E-04  2.41E+00  2.15E+00  1.12E-01  5.57E-01 -2.47E-01  1.00E-04
         3.07E+00  1.49E+00  4.34E-02

 OMEGA - COV MATRIX FOR RANDOM EFFECTS - ETAS  ********
         ETA1
 ETA1
+        1.00E+00

 OMEGA - CORR MATRIX FOR RANDOM EFFECTS - ETAS  *******
         ETA1
 ETA1
+        1.00E+00
 Elapsed finaloutput time in seconds:     2.34

 PROBLEM NO.:         2

 TOT. NO. OF OBS RECS:    10500
 TOT. NO. OF INDIVIDUALS:     1500
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 SIMULATION STEP PERFORMED
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 Elapsed simulation  time in seconds:     0.02
 Elapsed finaloutput time in seconds:     0.70
 #CPUT: Total CPU Time in Seconds,       98.016
